// COMSOL Multiphysics 6.0.0.318 model "Accustic_2D_Asymetric_Standart2.mph"
// Outline of the model tree

Geometry
  geom1 "Geometry 1" (2D axisymmetric, length unit m)
    r1: Rectangle | size = {0.4, 0.2}
    r2: Rectangle | pos = {0, 0.2}; size = {0.2, 0.2}
    r3: Rectangle | pos = {0, 0.4}; size = {0.4, 0.2}
    r4: Rectangle | pos = {0, 0.6}; size = {0.1, 0.2}
    uni1: Union | input = r1, r2, r3, r4
    fin: Finalize "Form Union"

Materials
  mat1: Common "Air" (disabled) on all domains
    def "Basic"
      relpermeability = 1
      relpermittivity = 1
      dynamicviscosity = eta(T[1/K])[Pa*s]
      ratioofspecificheat = 1.4
      electricconductivity = 0[S/m]
      heatcapacity = Cp(T[1/K])[J/(kg*K)]
      density = rho(pA[1/Pa],T[1/K])[kg/m^3]
      thermalconductivity = k(T[1/K])[W/(m*K)]
      soundspeed = cs(T[1/K])[m/s]
      eta: Piecewise | arg = T; pieces = {200.0, 1600.0, -8.38278E-7+8.35717342E-8*T^1-7.69429583E-11*T^2+4.6437266E-14*T^3-1.06585607E-17*T^4}
      Cp: Piecewise | arg = T; pieces = {200.0, 1600.0, 1047.63657-0.372589265*T^1+9.45304214E-4*T^2-6.02409443E-7*T^3+1.2858961E-10*T^4}
      rho: Analytic | expr = pA*0.02897/8.314/T; args = {pA, T}; dermethod = manual; argders = {{pA, d(pA*0.02897/8.314/T,pA)}, {T, d(pA*0.02897/8.314/T,T)}}
      k: Piecewise | arg = T; pieces = {200.0, 1600.0, -0.00227583562+1.15480022E-4*T^1-7.90252856E-8*T^2+4.11702505E-11*T^3-7.43864331E-15*T^4}
      cs: Analytic | expr = sqrt(1.4*287*T); args = T; dermethod = manual; argders = {T, d(sqrt(1.4*287*T),T)}
    RefractiveIndex
      n = 1
      ki = 0
  mat2: Common "H2O (water) [liquid]" (disabled) on domains 1-4
    def "Basic"
      thermalconductivity = k_liquid_2(T)
      thermalexpansioncoefficient = (alpha_liquid_2(T)+(Tempref-293[K])*if(abs(T-Tempref)>1e-3,(alpha_liquid_2(T)-alpha_liquid_2(Tempref))/(T-Tempref),d(alpha_liquid_2(T),T)))/(1+alpha_liquid_2(Tempref)*(Tempref-293[K]))
      heatcapacity = C_liquid_2(T)
      HC = HC_liquid_2(T)
      VP = VP_liquid_2(T)
      density = rho_liquid_2(T)
      TD = TD_liquid_2(T)
      dynamicviscosity = eta_liquid_1(T)
      SurfF = SurfF(T)
      soundspeed = 1440
      k_liquid_2: Piecewise | arg = T; pieces = {275.0, 370.0, -0.9003748+0.008387698*T^1-1.118205E-5*T^2}; argunit = K; fununit = W/(m*K)
      alpha_liquid_2: Piecewise
        arg = T
        pieces = 
          {273.0, 283.0, 0.01032507-7.62815E-5*T^1+1.412474E-7*T^2}
          {283.0, 373.0, -0.002464185+1.947611E-5*T^1-5.049672E-8*T^2+4.616995E-11*T^3}
        argunit = K
        fununit = 1/K
      C_liquid_2: Piecewise | arg = T; pieces = {293.0, 373.0, 4035.84079+0.492312034*T^1}; argunit = K; fununit = J/(kg*K)
      HC_liquid_2: Piecewise | arg = T; pieces = {293.0, 373.0, 72.6451184+0.00886161577*T^1}; argunit = K; fununit = J/(mol*K)
      VP_liquid_2: Piecewise | arg = T; pieces = {280.0, 600.0, (exp((-2.00512183e+03/T-5.56570000e-01*log10(T)+9.89879000e+00-1.11169009e+07/T^3)*log(10.0)))*1.33320000e+02}; argunit = K; fununit = Pa
      rho_liquid_2: Piecewise
        arg = T
        pieces = 
          {273.0, 283.0, 972.7584+0.2084*T^1-4.0E-4*T^2}
          {283.0, 373.0, 345.28+5.749816*T^1-0.0157244*T^2+1.264375E-5*T^3}
        argunit = K
        fununit = kg/m^3
      TD_liquid_2: Piecewise | arg = T; pieces = {273.0, 333.0, 8.04E-8+2.0E-10*T^1}; argunit = K; fununit = m^2/s
      eta_liquid_1: Piecewise | arg = T; pieces = {265.0, 423.0, exp(3.48378315E-09*T^4 - 5.27092524E-06*T^3 + 3.02511035E-03*T^2 - 7.90657912E-01*T + 7.19634916E+01)}; argunit = K; fununit = Pa*s
      SurfF: Piecewise
        arg = T
        pieces = 
          {274.0, 568.0, 0.07739832+2.071003E-4*T^1-1.23147E-6*T^2+2.344068E-9*T^3-3.033107E-12*T^4+1.758716E-15*T^5}
          {568.0, 647.0, -109.3735+0.9291756*T^1-0.003154159*T^2+5.351438E-6*T^3-4.539449E-9*T^4+1.540327E-12*T^5}
        argunit = K
        fununit = N/m
    ThermalExpansion
      alphatan = CTE_liquid_2(T)
      dL = (dL_liquid_2(T)-dL_liquid_2(Tempref))/(1+dL_liquid_2(Tempref))
      dL_liquid_2: Piecewise
        arg = T
        pieces = 
          {273.0, 283.0, 0.008486158-6.947021E-5*T^1+1.333373E-7*T^2}
          {283.0, 373.0, 0.232446637-0.002030447*T^1+5.510259E-6*T^2-4.395999E-9*T^3}
        argunit = K
      CTE_liquid_2: Piecewise
        arg = T
        pieces = 
          {273.0, 283.0, -6.947321E-5+2.666746E-7*T^1}
          {283.0, 293.0, -0.01363715+8.893977E-5*T^1-1.43925E-7*T^2}
          {293.0, 373.0, -0.00203045+1.102052E-5*T^1-1.3188E-8*T^2}
        argunit = K
        fununit = 1/K
  mat4: Common "Basalt [solid,1.29% porosity]" on domains 1-4
    def "Basic"
      thermalconductivity = k(T)
      TD = TD(T)
      density = 0.1
      soundspeed = 3000
      k: Piecewise | arg = T; pieces = {293.0, 543.0, 9.767743-0.02258568*T^1+1.756954E-5*T^2}; argunit = K; fununit = W/(m*K)
      TD: Piecewise | arg = T; pieces = {293.0, 543.0, 5.440749E-6-1.660211E-8*T^1+5.375029E-12*T^2+4.578405E-14*T^3-5.182491E-17*T^4}; argunit = K; fununit = m^2/s

Physics
  acpr: PressureAcoustics "Pressure Acoustics, Frequency Domain" on all domains
    dependent variable p
    fpam1: FrequencyPressureAcousticsModel "Pressure Acoustics 1" (default)
    axi1: AxialSymmetry (default)
    shb1: SoundHard "Sound Hard Boundary (Wall) 1" (default)
    init1: init "Initial Values 1" (default) | p = 20
    dps1: FrequencyDipolePointSource "Dipole Point Source 1" (disabled) on points 1
    pwr1: PlaneWaveRadiation on boundaries 2, 9

Mesh
  mesh1 "Mesh 1"
    size: MeshSizeDefault | hmax = 0.0536; hmin = 2.4E-4; hcurve = 0.3; hgrad = 1.3
    ftri1: FreeTri "Free Triangular 1" on remaining entities

Studies
  std1 "Study 1"
    eig: Eigenfrequency | shift = 1000

Solver configurations
  sol1 "Solution 1" (study std1)
    v1: Variables "Dependent Variables 1"
    e1: Eigenvalue "Eigenvalue Solver 1" | transform = eigenfrequency; shift = 1000; eigref = 100
      dDef: Direct

Datasets
  dset1: Solution | solution = sol1
  rev1: Revolve2D "Revolution 2D 1" | data = dset1; startangle = -90; revangle = 225

Plots
  pg1: PlotGroup2D "Acoustic Pressure (acpr)" | data = dset1
    surf1: Surface | expr = acpr.p_t
  pg2: PlotGroup2D "Sound Pressure Level (acpr)" | data = dset1
    surf1: Surface | expr = acpr.Lp
  pg3: PlotGroup3D "Acoustic Pressure, 3D (acpr)" | data = rev1
    surf1: Surface | expr = acpr.p_t
  pg4: PlotGroup3D "Sound Pressure Level, 3D (acpr)" | data = rev1
    surf1: Surface | expr = acpr.Lp