// COMSOL Multiphysics 6.0.0.318 model "Diffusion.mph"
// Outline of the model tree

Geometry
  geom1 "Geometry 1" (2D axisymmetric, length unit m)
    r1: Rectangle | pos = {-4, 0}; size = {8, 6}
    ls1: LineSegment | specify1 = coord; coord1 = {-0.1, 6}; specify2 = coord; coord2 = {0.1, 6}
    ls2: LineSegment | specify1 = coord; coord1 = {-0.1, 3}; specify2 = coord; coord2 = {-2, 0}
    ls3: LineSegment | vertex1 = ls2(1) points 2; specify2 = coord; coord2 = {2, 0}
    ls4: LineSegment | vertex1 = ls1(1) points 2; specify2 = coord; coord2 = {0.1, 3}
    ls5: LineSegment | specify1 = coord; coord1 = {0.1, 3}; specify2 = coord; coord2 = {2, 0}
    ls7: LineSegment
      specify1 = coord
      vertex1 = ls4(1) points 2
      coord1 = {0.1, 3}
      specify2 = coord
      vertex2 = ls6 1
      coord2 = {0.1, 6}
    ls8: LineSegment | vertex1 = ls1(1) points 1; vertex2 = ls2(1) points 1
    fin: Finalize "Form Union"

Materials
  mat4: Common "Engine oil" on domains 1
    def "Basic"
      dynamicviscosity = eta(T)
      heatcapacity = Cp(T)
      density = rho(T)
      thermalconductivity = k(T)
      eta: Piecewise
        arg = T
        pieces = 
          {273.0, 353.0, 42669.28688622-741.1718801282*T^1+5.360521287088*T^2-0.0206602767616*T^3+4.47491538052E-5*T^4-5.164053479202E-8*T^5+2.48033770504E-11*T^6}
          {353.0, 433.0, 4.94593941-0.0351869631*T^1+8.37935977E-5*T^2-6.67125E-8*T^3}
        argunit = K
        fununit = Pa*s
      Cp: Piecewise | arg = T; pieces = {273.0, 433.0, 761.405625+3.47685606*T^1+0.00115530303*T^2}; argunit = K; fununit = J/(kg*K)
      rho: Piecewise | arg = T; pieces = {273.0, 433.0, 1068.70404-0.6393421*T^1+7.34307359E-5*T^2}; argunit = K; fununit = kg/m^3
      k: Piecewise | arg = T; pieces = {273.0, 433.0, 0.192223542-2.0637987E-4*T^1+1.54220779E-7*T^2}; argunit = K; fununit = W/(m*K)
  mat5: Common "Soil [solid]" on domains 2
    def "Basic"
      thermalconductivity = k(T)
      heatcapacity = C(T)
      TD = TD(T)
      density = 1110
      dynamicviscosity = 0.002-0.003
      porosity = 0.1
      absorption = 0.1
      k: Piecewise
        arg = T
        pieces = 
          {293.0, 475.0, 0.0747638+1.451056E-4*T^1}
          {475.0, 525.0, 139.2152-1.028413*T^1+0.002851159*T^2-3.513043E-6*T^3+1.623188E-9*T^4}
        argunit = K
        fununit = W/(m*K)
      C: Piecewise
        arg = T
        pieces = 
          {293.0, 525.0, 2.32023594+0.0192117272*T^1}
          {525.0, 550.0, 90.8078206-0.14933332*T^1}
          {550.0, 600.0, -0.128124456+0.0160000009*T^1}
        argunit = K
        fununit = J/(kg*K)
      TD: Piecewise | arg = T; pieces = {293.0, 625.0, 1.812386E-7-6.00003E-10*T^1+8.89304E-13*T^2-4.005955E-16*T^3}; argunit = K; fununit = m^2/s

Physics
  tds: DilutedSpecies "Transport of Diluted Species" on all domains
    dependent variable c
    cdm1: ConvectionDiffusionMigration "Transport Properties 1" (default) | DiffusionMaterialList = none
    axi1: AxialSymmetry (default)
    nflx1: NoFlux (default)
    init1: init "Initial Values 1" (default) | initc = 0
    in1: Inflow on boundaries 3 | c0 = 10
    out1: Outflow on boundaries 2
    cdm2: ConvectionDiffusionMigration "Transport Properties 2" on domains 1
      u_src = userdef
      u = {0, 0, -4}
      DiffusionMaterialList = mat4
      D_c = 1e-1[m^2/s]

Mesh
  mesh1 "Mesh 1" (physics-controlled)

Studies
  std1 "Study 1"
    time: Transient "Time Dependent" | tunit = d; tlist = range(0,2,200)

Solver configurations
  sol1 "Solution 1" (study std1)
    v1: Variables "Dependent Variables 1"
    t1: Time "Time-Dependent Solver 1" | tlist = range(0,2,200); rtol = 0.005; maxorder = 2; stabcntrl = on
      fc1: FullyCoupled
        linsolver = d1
        maxiter = 8
        damp = 0.9
        jtech = once
        stabacc = aacc
        aaccdim = 5
        aaccmix = 0.9
        aaccdelay = 1
      d1: Direct "Direct, concentrations (tds)" | linsolver = pardiso; pivotperturb = 1.0E-13

Datasets
  dset1: Solution | solution = sol1
  rev1: Revolve2D "Revolution 2D 1" | data = dset1; startangle = -90; revangle = 225
  cln1: CutLine2D | data = dset1; genpoints = {{0.01, 6}, {4, 0}}; bounded = off

Plots
  pg1: PlotGroup2D "Concentration (tds)" | data = dset1
    surf1: Surface | expr = c
    str1: Streamline | expr = {tds.tflux_cr, tds.tflux_cz}; pointtype = arrow; arrowlength = logarithmic
  pg2: PlotGroup3D "Concentration, 3D (tds)" | data = rev1; typeintitle = off
    surf1: Surface | expr = c

Exports
  anim2: Animation | target = player; maxframes = 100